units lj
atom_style full
boundary p p p
read_data lammps_hmc.data
timestep 0.0025
include potential_ssp_analytic.lmp
pair_modify shift yes
fix hmc_rigid all rigid/nve molecule
compute hmc_ke all ke
compute hmc_pe all pe
velocity all create 0.15 12345 loop geom
run 50
